datax := READPRN("x_stress_data.txt")
datay := READPRN("y_stress_data.txt")
dataVM := READPRN("VM_stress_data.txt")
y := datax[:, 0]
KKNx := datax[:, 1]
y1 := datay[:, 0]
KKNy := datay[:, 1]
y2 := dataVM[:, 0]
KKNvm := dataVM[:, 1]
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max(KKNy) = 5.32996
max(KKNvm) = 15.764
max(KKNx) = 12.5194
