ORIGIN := 1
Xw := [0, 50]
Yw := [0, 30]
m := 5  # -число подобластей
X :=
    for i ∈ 1 .. cols(Xw)
        for j ∈ 1 .. cols(Xw)*cols(Yw)
            k ← trunc((j - 1)/cols(Yw)) + 1
            X[j] ← transpose(Xw)[k]
        V ← stack(V, transpose(Yw))
    for i ∈ 2 .. cols(Xw)*cols(Yw) + 1
        J[i - 1] ← V[i]
    augment(X, J)
SOD :=
    for i ∈ 1 .. 5
        for j ∈ 1 .. m
            S[i, 1] ← i
            S[i, 2] ← i
            S[i, 3] ← S[i, 2] + 4
            S[i, 4] ← S[i, 3] + 1
            S[i, 5] ← S[i, 4] - 4
    S
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X = [0, 0; 0, 30; 50, 0; 50, 30]
SOD = [1, 1, 5, 6, 2; 2, 2, 6, 7, 3; 3, 3, 7, 8, 4; 4, 4, 8, 9, 5; 5, 5, 9, 10, 6]
SOD := [1, 1, 5, 6, 2; 2, 2, 6, 7, 3; 3, 3, 7, 8, 4; 4, 5, 9, 10, 6; 5, 7, 11, 12, 8]
FX :=
    for i ∈ 1 .. m
        for j ∈ 1 .. 4
            FXS[i, j] ← X[:, 1][SOD[i, j + 1]]
            FXS[i, 5] ← FXS[i, 1]
            FXS[i, 6] ← sqrt(-1)
    FXS  # error: Индекс массива является недопустимым для этого массива.
FY :=
    for i ∈ 1 .. m
        for j ∈ 1 .. 4
            FYS[i, j] ← X[:, 2][SOD[i, j + 1]]
            FYS[i, 5] ← FYS[i, 1]
            FYS[i, 6] ← sqrt(-1)
    FYS  # error: Индекс массива является недопустимым для этого массива.
X = [0, 0; 0, 30; 50, 0; 50, 30]
Prog(M) :=
    k ← 1
    for i ∈ 1 .. rows(M)
        for j ∈ 1 .. cols(M)
            V[k] ← M[i, j]
            k ← k + 1
    V
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nodes := READPRN("nodes.txt")
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(145 - 150)^2 + (41.33975 - 50)^2 = 99.9999
elements := READPRN("elements.txt")
m := rows(elements) = 10  # - число элементов
n := rows(nodes) = 22
ORIGIN := 1
FX :=
    for i ∈ 1 .. m
        for j ∈ 1 .. 4
            FX[i, j] ← nodes[:, 2][elements[i, j + 1]]
            FX[i, 4] ← FX[i, 3] if j == 3
            FX[i, 5] ← FX[i, 1]
            FX[i, 6] ← sqrt(-1)
    FX
FY :=
    for i ∈ 1 .. m
        for j ∈ 1 .. 4
            FY[i, j] ← nodes[:, 3][elements[i, j + 1]]
            FY[i, 4] ← FY[i, 3] if j == 3
            FY[i, 5] ← FY[i, 1]
            FY[i, 6] ← sqrt(-1)
    FY
nodes = [
    1, 0, 0;
    2, 300, 0;
    3, 0, 20;
    4, 300, 20;
    5, 0, 40;
    6, 300, 40;
    7, 0, 60;
    8, 300, 60;
    9, 0, 80;
    10, 300, 80;
    11, 0, 100;
    12, 300, 100;
    13, 0, 120;
    14, 300, 120;
    15, 0, 140;
    16, 300, 140;
    17, 0, 160;
    18, 300, 160;
    19, 0, 180;
    20, 300, 180;
    21, 0, 200;
    22, 300, 200
]
elements = [
    1, 1, 2, 4, 3;
    2, 3, 4, 6, 5;
    3, 5, 6, 8, 7;
    4, 7, 8, 10, 9;
    5, 9, 10, 12, 11;
    6, 11, 12, 14, 13;
    7, 13, 14, 16, 15;
    8, 15, 16, 18, 17;
    9, 17, 18, 20, 19;
    10, 19, 20, 22, 21
]
Prog(M) :=
    k ← 1
    for i ∈ 1 .. rows(M)
        for j ∈ 1 .. cols(M)
            G[k] ← M[i, j]
            k ← k + 1
    G
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nodes1 := READPRN("nodes.txt")
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nodes1 = [
    1, 0, 0;
    2, 300, 0;
    3, 0, 20;
    4, 300, 20;
    5, 0, 40;
    6, 300, 40;
    7, 0, 60;
    8, 300, 60;
    9, 0, 80;
    10, 300, 80;
    11, 0, 100;
    12, 300, 100;
    13, 0, 120;
    14, 300, 120;
    15, 0, 140;
    16, 300, 140;
    17, 0, 160;
    18, 300, 160;
    19, 0, 180;
    20, 300, 180;
    21, 0, 200;
    22, 300, 200
]
elements1 := READPRN("elements.txt")
m1 := rows(elements1) = 10  # - число элементов после удаления подобласти
rows(nodes1) = 22  # - число узлов после удаления подобласти
ORIGIN := 1
FX :=
    for i ∈ 1 .. m1
        for j ∈ 1 .. 4
            FX[i, j] ← nodes1[:, 2][elements1[i, j + 1]]
            FX[i, 4] ← FX[i, 1] if j == 3
            FX[i, 5] ← FX[i, 1]
            FX[i, 6] ← sqrt(-1)
    FX
FY :=
    for i ∈ 1 .. m1
        for j ∈ 1 .. 4
            FY[i, j] ← nodes1[:, 3][elements1[i, j + 1]]
            FY[i, 4] ← FY[i, 3] if j == 3
            FY[i, 5] ← FY[i, 1]
            FY[i, 6] ← sqrt(-1)
    FY
nodes1 = [
    1, 0, 0;
    2, 300, 0;
    3, 0, 20;
    4, 300, 20;
    5, 0, 40;
    6, 300, 40;
    7, 0, 60;
    8, 300, 60;
    9, 0, 80;
    10, 300, 80;
    11, 0, 100;
    12, 300, 100;
    13, 0, 120;
    14, 300, 120;
    15, 0, 140;
    16, 300, 140;
    17, 0, 160;
    18, 300, 160;
    19, 0, 180;
    20, 300, 180;
    21, 0, 200;
    22, 300, 200
]
elements1 = [
    1, 1, 2, 4, 3;
    2, 3, 4, 6, 5;
    3, 5, 6, 8, 7;
    4, 7, 8, 10, 9;
    5, 9, 10, 12, 11;
    6, 11, 12, 14, 13;
    7, 13, 14, 16, 15;
    8, 15, 16, 18, 17;
    9, 17, 18, 20, 19;
    10, 19, 20, 22, 21
]
Prog(M) :=
    k ← 1
    for i ∈ 1 .. rows(M)
        for j ∈ 1 .. cols(M)
            G[k] ← M[i, j]
            k ← k + 1
    G
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FX = [
    0, 300, 300, 0, 0, 1i;
    0, 300, 300, 0, 0, 1i;
    0, 300, 300, 0, 0, 1i;
    0, 300, 300, 0, 0, 1i;
    0, 300, 300, 0, 0, 1i;
    0, 300, 300, 0, 0, 1i;
    0, 300, 300, 0, 0, 1i;
    0, 300, 300, 0, 0, 1i;
    0, 300, 300, 0, 0, 1i;
    0, 300, 300, 0, 0, 1i
]
FY = [
    0, 0, 20, 20, 0, 1i;
    20, 20, 40, 40, 20, 1i;
    40, 40, 60, 60, 40, 1i;
    60, 60, 80, 80, 60, 1i;
    80, 80, 100, 100, 80, 1i;
    100, 100, 120, 120, 100, 1i;
    120, 120, 140, 140, 120, 1i;
    140, 140, 160, 160, 140, 1i;
    160, 160, 180, 180, 160, 1i;
    180, 180, 200, 200, 180, 1i
]
global_stiffness_matrix := READPRN("out_stiffness_matrix.txt")
global_load_vector := READPRN("out_loads_vec.txt")
GSM := global_stiffness_matrix
GLV := global_load_vector
# сумма элементов строки или столбца матрицы должна быть равна нулю
sum :=
    for i ∈ 1 .. rows(GSM)
        sum[i] ← sum(GSM[i, j], j = 1 .. cols(GSM))
    sum
GSM =  # no stored result
GLV = [
    -10000; 0; 0; 0; -20000; 0; 0; 0; -20000; 0
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]
sum = [
    192308; 149232; 1; 1; 61530; 21550; 1; 1; 61530; 21550
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]
sum(GLV[i], i = 1 .. rows(GLV)) = -200000  # Н
u := READPRN("u.txt")  # вектор перемещений, полученный с помощью PARDISO
# Аналитика:
a := 150  # мм
b := 100  # мм
q := 1000  # Н/мм
t := 3  # мм
E := 2.1*10^5  # МПа
σ := q*b/(t*b) = 333.333  # МПа
|GSM| = 4.64412e139
disp := GSM^-1*GLV
scale := 20
u_an := a*σ/E = 0.238095
NEW_COORDS :=
    n ← rows(nodes)
    for i ∈ 1 .. n
        res[i, 2] ← nodes[i, 2] + scale*u[2*i - 1]
        res[i, 3] ← nodes[i, 3] + scale*u[2*i - 0]
        res[i, 1] ← i
    res
NEW_COORDS = [
    1, -7.12501, 1.03285;
    2, 300, 0;
    3, -7.03456, 20.8211;
    4, 300, 20;
    5, -6.96763, 40.6128;
    6, 300, 40;
    7, -6.92161, 60.4071;
    8, 300, 60;
    9, -6.89469, 80.2031;
    10, 300, 80;
    11, -6.88584, 100;
    12, 300, 100;
    13, -6.89469, 119.797;
    14, 300, 120;
    15, -6.92161, 139.593;
    16, 300, 140;
    17, -6.96763, 159.387;
    18, 300, 160;
    19, -7.03456, 179.179;
    20, 300, 180;
    21, -7.12501, 198.967;
    22, 300, 200
]
disp = [
    -0.356294; 0.0516483; 0; 0; -0.351772; 0.0410605; 0; 0; -0.348426; 0.0306448
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]
u = [
    -0.35625; 0.0516427; 0; 0; -0.351728; 0.0410562; 0; 0; -0.348382; 0.0306417
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]
FXn :=
    for i ∈ 1 .. m1
        for j ∈ 1 .. 4
            FX[i, j] ← NEW_COORDS[:, 2][elements[i, j + 1]]
            FX[i, 4] ← FX[i, 3] if j == 3
            FX[i, 5] ← FX[i, 1]
            FX[i, 6] ← sqrt(-1)
    FX
FYn :=
    for i ∈ 1 .. m1
        for j ∈ 1 .. 4
            FY[i, j] ← NEW_COORDS[:, 3][elements1[i, j + 1]]
            FY[i, 4] ← FY[i, 3] if j == 3
            FY[i, 5] ← FY[i, 1]
            FY[i, 6] ← sqrt(-1)
    FY
Prog(M) :=
    k ← 1
    for i ∈ 1 .. rows(M)
        for j ∈ 1 .. cols(M)
            G[k] ← M[i, j]
            k ← k + 1
    G
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nodes = [
    1, 0, 0;
    2, 300, 0;
    3, 0, 20;
    4, 300, 20;
    5, 0, 40;
    6, 300, 40;
    7, 0, 60;
    8, 300, 60;
    9, 0, 80;
    10, 300, 80;
    11, 0, 100;
    12, 300, 100;
    13, 0, 120;
    14, 300, 120;
    15, 0, 140;
    16, 300, 140;
    17, 0, 160;
    18, 300, 160;
    19, 0, 180;
    20, 300, 180;
    21, 0, 200;
    22, 300, 200
]
NEW_COORDS = [
    1, -7.12501, 1.03285;
    2, 300, 0;
    3, -7.03456, 20.8211;
    4, 300, 20;
    5, -6.96763, 40.6128;
    6, 300, 40;
    7, -6.92161, 60.4071;
    8, 300, 60;
    9, -6.89469, 80.2031;
    10, 300, 80;
    11, -6.88584, 100;
    12, 300, 100;
    13, -6.89469, 119.797;
    14, 300, 120;
    15, -6.92161, 139.593;
    16, 300, 140;
    17, -6.96763, 159.387;
    18, 300, 160;
    19, -7.03456, 179.179;
    20, 300, 180;
    21, -7.12501, 198.967;
    22, 300, 200
]
FX = [
    0, 300, 300, 0, 0, 1i;
    0, 300, 300, 0, 0, 1i;
    0, 300, 300, 0, 0, 1i;
    0, 300, 300, 0, 0, 1i;
    0, 300, 300, 0, 0, 1i;
    0, 300, 300, 0, 0, 1i;
    0, 300, 300, 0, 0, 1i;
    0, 300, 300, 0, 0, 1i;
    0, 300, 300, 0, 0, 1i;
    0, 300, 300, 0, 0, 1i
]
FXn = [
    -7.12501, 300, 300, -7.03456, -7.12501, 1i;
    -7.03456, 300, 300, -6.96763, -7.03456, 1i;
    -6.96763, 300, 300, -6.92161, -6.96763, 1i;
    -6.92161, 300, 300, -6.89469, -6.92161, 1i;
    -6.89469, 300, 300, -6.88584, -6.89469, 1i;
    -6.88584, 300, 300, -6.89469, -6.88584, 1i;
    -6.89469, 300, 300, -6.92161, -6.89469, 1i;
    -6.92161, 300, 300, -6.96763, -6.92161, 1i;
    -6.96763, 300, 300, -7.03456, -6.96763, 1i;
    -7.03456, 300, 300, -7.12501, -7.03456, 1i
]
FY = [
    0, 0, 20, 20, 0, 1i;
    20, 20, 40, 40, 20, 1i;
    40, 40, 60, 60, 40, 1i;
    60, 60, 80, 80, 60, 1i;
    80, 80, 100, 100, 80, 1i;
    100, 100, 120, 120, 100, 1i;
    120, 120, 140, 140, 120, 1i;
    140, 140, 160, 160, 140, 1i;
    160, 160, 180, 180, 160, 1i;
    180, 180, 200, 200, 180, 1i
]
FYn = [
    1.03285, 0, 20, 20.8211, 1.03285, 1i;
    20.8211, 20, 40, 40.6128, 20.8211, 1i;
    40.6128, 40, 60, 60.4071, 40.6128, 1i;
    60.4071, 60, 80, 80.2031, 60.4071, 1i;
    80.2031, 80, 100, 100, 80.2031, 1i;
    100, 100, 120, 119.797, 100, 1i;
    119.797, 120, 140, 139.593, 119.797, 1i;
    139.593, 140, 160, 159.387, 139.593, 1i;
    159.387, 160, 180, 179.179, 159.387, 1i;
    179.179, 180, 200, 198.967, 179.179, 1i
]
(|u[1]| - |u[3]|)/|u[1]|*100 = 100
